# Worksheet setting: ORIGIN = 1
A1 := READPRN("C:\Users\Daniel\Documents\Visual Studio 2013\Projects\StochasticBatch\CrackGrowthModel\out1.txt")
A2 := READPRN("C:\Users\Daniel\Documents\Visual Studio 2013\Projects\StochasticBatch\CrackGrowthModel\out2.txt")
A3 := READPRN("C:\Users\Daniel\Documents\Visual Studio 2013\Projects\StochasticBatch\CrackGrowthModel\out3.txt")
A4 := READPRN("C:\Users\Daniel\Documents\Visual Studio 2013\Projects\StochasticBatch\CrackGrowthModel\out4.txt")
A5 := READPRN("C:\Users\Daniel\Documents\Visual Studio 2013\Projects\StochasticBatch\CrackGrowthModel\out5.txt")
A6 := READPRN("C:\Users\Daniel\Documents\Visual Studio 2013\Projects\StochasticBatch\CrackGrowthModel\out6.txt")
A7 := READPRN("C:\Users\Daniel\Documents\Visual Studio 2013\Projects\StochasticBatch\CrackGrowthModel\out7.txt")
A8 := READPRN("C:\Users\Daniel\Documents\Visual Studio 2013\Projects\StochasticBatch\CrackGrowthModel\out8.txt")
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A8[:, 3] =  # no stored result
A1 := READPRN("C:\Users\Daniel\Documents\Visual Studio 2013\Projects\StochasticBatch\CrackGrowthModel\now.txt")
A2 := READPRN("C:\Users\Daniel\Documents\Visual Studio 2013\Projects\StochasticBatch\CrackGrowthModel\now1.txt")
A3 := READPRN("C:\Users\Daniel\Documents\Visual Studio 2013\Projects\StochasticBatch\CrackGrowthModel\now2.txt")
d(A) :=
    for i ∈ 1 .. rows(A) - 1
        V[i, 1] ← (A[:, 1][i + 1] - A[:, 1][i])/(A[:, 2][i + 1] - A[:, 2][i])
        V[i, 2] ← (A[:, 2][i + 1] + 1*A[:, 2][i])/2
    V
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