Β(a, Ω, A, k, α, β, σ_ex, l, K_max, K_min) := a/Ω*nthroot(1 - ((σ_ex*sqrt(π*l) - K_min)/(K_max - K_min))^α, β)/integral(A*e^(k*x), x = 0 .. a)
a_func(l, δ, a_0, l_0, mm, K_Ic_max, σ, αα, ββ) := a_0*(1 + (mm - 1)*(1 - ((K_Ic_max^2/(π*σ^2)*(1 - δ) - l)/(K_Ic_max^2/(π*σ^2)*(1 - δ) - l_0))^ββ)^(1/αα))
Γ(D, ζ, σ_ex, l, a, b, A, k) := integral((A*e^(k*x))^2, x = a .. b)/(D*integral(d^2/dx^2(A*e^(k*x))*(A*e^(k*x)), x = a .. b) + (-ζ*(σ_ex*sqrt(π*l))/(2*sqrt(π))*integral(d/dx(A*e^(k*x))*(A*e^(k*x)), x = a .. b)))
a_func(0.002, 0.05, 10^-5, 0.002, 50, 80, 140, 2, 2) = 1e-5
Δt_d(D, ζ, σ_ex, l, a, b, A, k, Ω, α, β, K_max, K_min) := Γ(D, ζ, σ_ex, l, a, b, A, k)*ln(Β(a, Ω, A, k, α, β, σ_ex, l, K_max, K_min))
l := 0.0289
δ := 0.05
a_0 := 10^-5
l_0 := 0.002
mm := 50
K_max := 80
K_min := 10
Ω := 1.5
A := 0.002
k := -1580
α := 2
β := 2
## Paris - Erdogan law
F(a, b, n, C, σ) := integral(1/(C*(σ*sqrt(π*x))^n), x = a .. b)
G(a, b, n, C, σ) := 1/(C*σ^n*π^(n/2)*(1 - n/2))*(b^(1 - n/2) - a^(1 - n/2))
l_0 = 0.002
l := 0.02
n := 3.24
C := 1.095*10^-12
σ := 140
f := 1
a := a_func(l, 0.05, a_0, l_0, mm, K_max, σ, 2, 2) = 0.000294668
c_10(x, a, k_a) := (1 - (1 - k_a)/a*x)
c_20(x, a, b, k_a, k_b) := k_a*e^(ln(k_b/k_a)*(x - a)/(b - a))
integral(1/(C*(σ*sqrt(π*x))^n), x = l .. l + a)/f = 2619.78
G(l, l + a, n, C, σ)/f = 2619.78
S(x, a, b, k_a, k_b) :=
    1 if x == 0
    c_10(x, a, k_a) if 0 < x ≤ a
    c_20(x, a, b, k_a, k_b) otherwise
l_0 := 2
l := 10
X := 0, 0.1 .. l
X := [
    0; 0.1; 0.2; 0.3; 0.4; 0.5; 0.6; 0.7; 0.8; 0.9
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]
Y := [
    1; 0.975; 0.95; 0.925; 0.9; 0.875; 0.85; 0.825; 0.8; 0.775
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]
[a; b; c] := expfit(X, Y) = [0.907757; -0.345933; 0.0945223]
f(x) := a*e^(b*x) + c
g(x) := e^intercept(X, ln(Y))*e^(slope(X, ln(Y))*x)
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