Y := [1; -1; 4; 18; -780]
X := [1; 2; 3; 6; 56]
intercept(X, Y) = 48.3955
mean(X) = 13.6
slope(X, Y) = -14.7056
mean(Y) = -151.6
v := sum((X[i] - mean(X))^2, i = 0 .. 3)/4 = 115.86
c := sum((X[i] - mean(X))*(Y[i] - mean(Y)), i = 0 .. 3)/4 = -1652.01
s := c/v = -14.2587
i := mean(Y) - (s*mean(X)) = 42.318
